clock{
  timezone EST+5EDT;
  timestamp '2013-07-01 14:00:00';
  stoptime '2013-07-01 15:00:00';
}

module connection;
module climate;
module generators;
module residential;
module tape;

object climate {
  name exampleWeather;
  interpolate QUADRATIC;
	latitude 32;
	longitude -97;
};
object solar {
	name solarGenerator;
	weather exampleWeather;
    generator_mode SUPPLY_DRIVEN;
    generator_status ONLINE;
    panel_type SINGLE_CRYSTAL_SILICON;
		orientation FIXED_AXIS;
    efficiency 0.2;
    area 2500 sf;
}

object house {
	name weatherHouse;
}

//#ifdef USE_FNCS
object fncs_msg {
  name gridlabdweatheragent;
  configure weather_FNCS_Config.txt;
  option "transport:hostname localhost, port 5570";
  aggregate_subscriptions true;
  aggregate_publications true;
};
//#endif

object recorder{
	parent exampleWeather;
	property temperature,humidity,solar_direct,solar_diffuse,pressure,wind_speed;
	interval -1;
	file climate.csv;
};
object recorder{
	parent solarGenerator;
	property weather,wind_speed,Tmodule,Tambient,NOCT;
	interval -1;
	file generator.csv;
};
object recorder{
	parent weatherHouse;
	property weather,solar_gain,incident_solar_radiation,horizontal_diffuse_solar_radiation,outdoor_temperature,outdoor_rh;
	interval -1;
	file house.csv;
};
